OpenVSP model (file version 5), 20 components.
Geometry view with OpenVSP parameter names; values to 6 digits, angles in degrees, lengths in the model's unit.
Overall bounding box: X_Min=0 X_Len=7.26216 Y_Min=-5.29984 Y_Len=10.5997 Z_Min=-1.20059 Z_Len=3.0777

Fuselage "FUSELAGE_main"
  location (X Y Z) 0 0 0, rotation 0 0 0
  bounding box size 6.77003 0.7 0.75
  mass: Density=4.04453 Shell_Flag=0 Mass_Area=1 Mass_Prior=0
  Design: Length=6.77
  cross sections:
    n  CurveBasis  XLocPercent  YLocPercent  ZLocPercent  shape
    0  0           0            0            0            point
    1  0           0.14771      0            0            ellipse Ellipse_Height=0.75 Ellipse_Width=0.7
    2  0           0.502216     0            0            as above
    3  0           1            0            0.0395864    ellipse Ellipse_Height=0.214 Ellipse_Width=0.2
    4  0           1            0            0.0395864    as above

Wing "WING_main", child of "FUSELAGE_main"
  location (X Y Z) 2.126 0 0.38, rotation 0 0 0
  symmetric about XZ
  bounding box size 1.00002 10.5997 0.158542
  mass: Density=5.43417 Shell_Flag=0 Mass_Area=1 Mass_Prior=1
  totals: TotalSpan=10.5 TotalProjectedSpan=10.5 TotalChord=1 TotalArea=10.5 TotalAR=10.5 MAC=0.999826
  root: chord 1, twist 0, airfoil file "SD7062 (14%)"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 BaseThickChord=0.140831 ThickChord=0.14083
  sections:
    n  Span  Root_Chord  Tip_Chord  Area  Sweep  Sweep_Location  Dihedral  Twist  Twist_Location  tip airfoil
    1  5.25  1           1          5.25  0      0               0         -1.5   0.25            NACA 4-series Camber=0 CamberLoc=0.2 ThickChord=0.1
  SS_Control "Flaps": EtaStart=0.1 EtaEnd=0.7 Length_C_Start=0.25 Length_C_End=0.25 Length_Start=0.249936 Length_End=0.249967 LE_Flag=0 Surf_Type=2
  SS_Control "Aileron": EtaStart=0.8 EtaEnd=0.95 Length_C_Start=0.25 Length_C_End=0.25 Length_Start=0.249977 Length_End=0.249994 LE_Flag=0 Surf_Type=2

Pod "engine_pod_left", child of "WING_main"
  location (X Y Z) 1.926 -1 0.38, rotation 0 0 0; relative location -0.2 -1 0, rotation 0 0 0
  bounding box size 1.4 0.0933333 0.0933333
  mass: Density=1679.07 Shell_Flag=0 Mass_Area=1 Mass_Prior=1
  Design: FineRatio=30 Length=1.4

Propeller "left_prop", child of "engine_pod_left"
  location (X Y Z) 2.026 -1 0.38, rotation 0 0 0; relative location 0.1 0 0, rotation 0 0 0
  bounding box size 0.0662609 1.047 1.19803
  mass: Density=121.842 Shell_Flag=0 Mass_Area=1 Mass_Prior=2
  Design: Diameter=1.3333 NumBlade=3 Beta34=20 UseBeta34Flag=1 Feather=0 Rotate=0 Precone=0 ReverseFlag=0 FoldAngle=0 PropMode=0 AF=151.538 CLi=0.538798 Chord=0.177656 Solidity=0.169649 ConstructXoC=0.5 FeatherAxisXoC=0.5 FeatherOffsetXoC=0
  cross sections:
    n  RadiusFrac  shape
    0  0.2         ellipse Ellipse_Height=0.026666 Ellipse_Width=0.053332
    1  0.4         NACA 16-series Chord=0.110831 IdealCl=0.7 ThickChord=0.144074
    2  1           NACA 16-series Chord=0.0866645 IdealCl=0.2 ThickChord=0.03
  Chord along r/R (cubic Bezier): 0.2: 0.08, 0.333333: 0.15, 0.466667: 0.2, 0.6: 0.2, 0.716667: 0.2, 0.833333: 0.2, 0.95: 0.2, 0.966667: 0.2, 0.983333: 0.2, 1: 0.13
  Twist along r/R (PCHIP): 0.2: 46.75, 0.75: 20, 1: 13
  Thick along r/R (cubic Bezier): 0.2: 0.5, 0.233333: 0.3, 0.266667: 0.225, 0.3: 0.2, 0.4: 0.125, 0.5: 0.115, 0.6: 0.1, 0.733333: 0.075, 0.866667: 0.055, 1: 0.03
  CLI along r/R (cubic Bezier): 0.2: 0, 0.266667: 0.7, 0.333333: 0.7, 0.4: 0.7, 0.466667: 0.7, 0.533333: 0.7, 0.6: 0.7, 0.733333: 0.7, 0.866667: 0.7, 1: 0.2

Pod "engine_pod_right", child of "WING_main"
  location (X Y Z) 1.926 1 0.38, rotation 0 0 0; relative location -0.2 1 0, rotation 0 0 0
  bounding box size 1.4 0.0933333 0.0933333
  mass: Density=1679.07 Shell_Flag=0 Mass_Area=1 Mass_Prior=1
  Design: FineRatio=30 Length=1.4

Propeller "prop_right", child of "engine_pod_right"
  location (X Y Z) 2.026 1 0.38, rotation 0 0 0; relative location 0.1 0 0, rotation 0 0 0
  bounding box size 0.0662609 1.047 1.19803
  mass: Density=121.842 Shell_Flag=0 Mass_Area=1 Mass_Prior=2
  Design: Diameter=1.3333 NumBlade=3 Beta34=20 UseBeta34Flag=1 Feather=0 Rotate=0 Precone=0 ReverseFlag=0 FoldAngle=0 PropMode=0 AF=151.538 CLi=0.538798 Chord=0.177656 Solidity=0.169649 ConstructXoC=0.5 FeatherAxisXoC=0.5 FeatherOffsetXoC=0
  cross sections:
    n  RadiusFrac  shape
    0  0.2         ellipse Ellipse_Height=0.026666 Ellipse_Width=0.053332
    1  0.4         NACA 16-series Chord=0.110831 IdealCl=0.7 ThickChord=0.144074
    2  1           NACA 16-series Chord=0.0866645 IdealCl=0.2 ThickChord=0.03
  blade curves as in "left_prop"

Fuselage "Motors", child of "WING_main"
  location (X Y Z) 2.126 1 0.38, rotation 0 0 0; relative location 0 1 0, rotation 0 0 0
  symmetric about XZ
  bounding box size 0.4 2.33536 0.335355
  mass: Density=97.3544 Shell_Flag=0 Mass_Area=1 Mass_Prior=3
  Design: Length=0.4
  cross sections:
    n  CurveBasis  XLocPercent  YLocPercent  ZLocPercent  shape
    0  0           0            0            0            circle Circle_Diameter=0.3
    1  0           0.25         0            0            as above
    2  0           0.5          0            0            as above
    3  0           1            0            0            as above

Wing "flaps_extended", child of "WING_main"
  location (X Y Z) 3.126 0.525 0.38, rotation 0 15 0; relative location 1 0.525 0, rotation 0 15 0
  symmetric about XZ
  bounding box size 0.279001 7.35 0.111753
  mass: Density=0 Shell_Flag=0 Mass_Area=1 Mass_Prior=0
  totals: TotalSpan=6.3 TotalProjectedSpan=6.3 TotalChord=0.25 TotalArea=1.575 TotalAR=25.2 MAC=0.25099
  root: chord 0.27778, twist 0, airfoil file "SD7062 (14%)"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 BaseThickChord=0.140831 ThickChord=0.14083
  sections:
    n  Span  Root_Chord  Tip_Chord  Area    Sweep  Sweep_Location  Dihedral  Twist  Twist_Location  tip airfoil
    1  3.15  0.27778     0.22222    0.7875  0      0               0         0      0               NACA 4-series Camber=0 CamberLoc=0.2 ThickChord=0.1

Custom "CubeSat_1", child of "FUSELAGE_main"
  location (X Y Z) 2.7 0 0, rotation 0 0 0
  bounding box size 0.32833 0.32833 0.32833
  mass: Density=168.611 Shell_Flag=0 Mass_Area=1 Mass_Prior=3
  Design: Height=0.32833 Length=0.32833 SquareFlag=0 Width=0.32833
  custom script Box0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

Custom "CubeSat_2", child of "FUSELAGE_main"
  location (X Y Z) 3.05 0 0, rotation 0 0 0
  bounding box size 0.32833 0.32833 0.32833
  mass: Density=168.611 Shell_Flag=0 Mass_Area=1 Mass_Prior=3
  Design: Height=0.32833 Length=0.32833 SquareFlag=0 Width=0.32833
  custom script Box0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

Wing "Horizontal_tail_1", child of "FUSELAGE_main"
  location (X Y Z) 5.9 0 0.268, rotation 0 0 0
  symmetric about XZ
  bounding box size 0.773415 2.32734 0.0781951
  mass: Density=3.04985 Shell_Flag=0 Mass_Area=1 Mass_Prior=1
  totals: TotalSpan=2.32734 TotalProjectedSpan=2.32734 TotalChord=0.773415 TotalArea=1.8 TotalAR=3.00917 MAC=0.773415
  root: chord 0.773415, twist 0, airfoil file "SD8020-010-88"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 BaseThickChord=0.1011 ThickChord=0.1011
  sections:
    n  Span     Root_Chord  Tip_Chord  Area  Sweep  Sweep_Location  Dihedral  Twist  Twist_Location  tip airfoil
    1  1.16367  0.773415    0.773415   0.9   0      0               0         0      0.25            NACA 4-series Camber=0 CamberLoc=0.2 ThickChord=0.1
  SS_Control "Elevator": EtaStart=0.1 EtaEnd=1 Length_C_Start=0.25 Length_C_End=0.25 Length_Start=0.193354 Length_End=0.193354 LE_Flag=0 Surf_Type=2

Wing "Vertical_tail_2", child of "FUSELAGE_main"
  location (X Y Z) 5.82 0 0.36, rotation 90 0 0
  bounding box size 1.44216 0.0937146 1.5171
  mass: Density=9.24176 Shell_Flag=0 Mass_Area=1 Mass_Prior=1
  totals: TotalSpan=1.5171 TotalProjectedSpan=1.5171 TotalChord=0.751432 TotalArea=1.14 TotalAR=2.01895 MAC=0.766642
  root: chord 0.936602, twist 0, NACA 4-series Camber=0 CamberLoc=0.2 ThickChord=0.1
  sections:
    n  Span    Root_Chord  Tip_Chord  Area  Sweep  Sweep_Location  Dihedral  Twist  Twist_Location  tip airfoil
    1  1.5171  0.936602    0.566261   1.14  30     0               0         0      0.25            as above
  SS_Control "SS_CONT_0": EtaStart=0.1 EtaEnd=0.9 Length_C_Start=0.25 Length_C_End=0.25 Length_Start=0.224892 Length_End=0.150824 LE_Flag=0 Surf_Type=2

Custom "tail_gear_arm", child of "FUSELAGE_main"
  location (X Y Z) 5.5 0 -0.3, rotation 0 0 0
  bounding box size 0.013123 0.013123 0.69616
  mass: Density=0 Shell_Flag=0 Mass_Area=1 Mass_Prior=2 PointMass=0.17815 CGx=0 CGy=0 CGz=0 Ixx=0 Iyy=0 Izz=0 Ixy=0 Ixz=0 Iyz=0
  Design: Height=0.69616 Length=0.013123 SquareFlag=0 Width=0.013123
  custom script Box0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

Gear "Gear_Tail", child of "FUSELAGE_main"
  location (X Y Z) 5.997 0 -0.35, rotation 0 0 0
  bounding box size 0.291667 0.180028 0.291667
  mass: Density=34.5404 Shell_Flag=0 Mass_Area=1 Mass_Prior=3
  Gear: GearConfigMode=0
  bogie "BOGIE_0": NumAcross=1 NumTandem=1 Spacing=0.114583 Pitch=0.320833 Symmetrical=0 XContactPt=0 YContactPt=0 TravelCompressed=1 TravelExtended=1 SteeringAngle=0 DiameterModel=0.291667 WidthModel=0.104167 PlyRating=20

Custom "arm_main_gear", child of "FUSELAGE_main"
  location (X Y Z) 1.5 0.43478 -0.72, rotation 49 0 0
  symmetric about XZ
  bounding box size 0.013 1.9725 0.96119
  mass: Density=0 Shell_Flag=0 Mass_Area=1 Mass_Prior=2 PointMass=0.53445 CGx=0 CGy=0 CGz=0 Ixx=0 Iyy=0 Izz=0 Ixy=0 Ixz=0 Iyz=0
  Design: Height=1.45 Length=0.013 SquareFlag=0 Width=0.013123
  custom script Box0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

Gear "Gear_Main", child of "FUSELAGE_main"
  location (X Y Z) 1.794 0.433 -0.75, rotation 0 0 0
  symmetric about XZ
  bounding box size 0.501667 3.14369 0.501667
  mass: Density=44.7723 Shell_Flag=0 Mass_Area=1 Mass_Prior=3
  Gear: GearConfigMode=0
  bogie "front_left": NumAcross=1 NumTandem=1 Spacing=0.108167 Pitch=0.551833 Symmetrical=0 XContactPt=0 YContactPt=1.05 TravelCompressed=1 TravelExtended=1 SteeringAngle=0 DiameterModel=0.501667 WidthModel=0.0983333 PlyRating=20

Custom "Battery_1", child of "FUSELAGE_main"
  location (X Y Z) 1.85 0 0.15, rotation 0 0 0
  bounding box size 0.784167 0.344 0.263
  mass: Density=198.654 Shell_Flag=0 Mass_Area=1 Mass_Prior=3
  Design: Height=0.263 Length=0.784167 SquareFlag=0 Width=0.344
  custom script Box0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

Custom "Battery_2", child of "FUSELAGE_main"
  location (X Y Z) 1.85 0 -0.13, rotation 0 0 0
  bounding box size 0.784167 0.344 0.263
  mass: Density=198.654 Shell_Flag=0 Mass_Area=1 Mass_Prior=3
  Design: Height=0.263 Length=0.784167 SquareFlag=0 Width=0.344
  custom script Box0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

Fuselage "AV_bay", child of "FUSELAGE_main"
  location (X Y Z) 0.65 0 0, rotation 0 0 0
  bounding box size 1 0.541667 0.541667
  mass: Density=23.436 Shell_Flag=0 Mass_Area=1 Mass_Prior=3
  Design: Length=1
  cross sections:
    n  CurveBasis  XLocPercent  YLocPercent  ZLocPercent  shape
    0  0           0            0            0            circle Circle_Diameter=0.541667
    1  0           1            0            0            as above

NGonMesh "MeshGeom_NGon"
  location (X Y Z) 0 0 0, rotation 0 0 0
  bounding box size 7.26216 10.5 2.2521

VSPAERO settings (reference component "WING_main"): Sref=10.5 bref=10.5 cref=0.999826 Xcg=2.37575 Ycg=8.65456e-09 Zcg=0.0461402 AlphaStart=-5 AlphaEnd=12 AlphaNpts=18 BetaStart=0 BetaEnd=0 BetaNpts=1 MachStart=0.208 MachEnd=0 MachNpts=1 ReCref=1.3e+06 Vinf=150 Rho=0.012157
  control group "Flaps": DeflectionAngle=0
  control group "Ailerons": DeflectionAngle=0
  control group "Rudders": DeflectionAngle=0
  control group "Elevators": DeflectionAngle=0
