OpenVSP model (file version 5), 14 components.
Geometry view with OpenVSP parameter names; values to 6 digits, angles in degrees, lengths in the model's unit.
Overall bounding box: X_Min=-0.164975 X_Len=6.43564 Y_Min=-3.99009 Y_Len=7.98018 Z_Min=-0.375 Z_Len=1.34683

Fuselage "main_fuse"
  location (X Y Z) 0 0 0, rotation 0 0 0
  bounding box size 6.43501 0.7 0.75
  Design: Length=6.27
  cross sections:
    n  CurveBasis  XLocPercent  YLocPercent  ZLocPercent  shape
    0  0           0            0            0            ellipse Ellipse_Height=0.43 Ellipse_Width=0.4
    1  0           0.125        0            0            ellipse Ellipse_Height=0.75 Ellipse_Width=0.7
    2  0           0.558499     0            0            as above
    3  0           1            0            0            ellipse Ellipse_Height=0.214 Ellipse_Width=0.2
    4  0           1            0            0            as above

Wing "main_wing", child of "main_fuse"
  location (X Y Z) 1.7 0 0.38, rotation 0 2 0
  symmetric about XZ
  bounding box size 2.04547 7.98018 0.37641
  totals: TotalSpan=7.98018 TotalProjectedSpan=7.98018 TotalChord=1.62904 TotalArea=13 TotalAR=4.89871 MAC=1.66293
  root: chord 2.03605, twist 0, NACA 4-series Camber=0 CamberLoc=0.2 ThickChord=0.15
  sections:
    n  Span     Root_Chord  Tip_Chord  Area  Sweep  Sweep_Location  Dihedral  Twist  Twist_Location  tip airfoil
    1  3.99009  2.03605     1.22203    6.5   0      0               0         0      0.25            NACA 4-series Camber=0 CamberLoc=0.2 ThickChord=0.1

Pod "left_pod", child of "main_wing"
  location (X Y Z) 1.50012 -1 0.38698, rotation 0 2 0; relative location -0.2 -1 0, rotation 0 0 0
  bounding box size 2.00952 0.307692 0.377304
  Design: FineRatio=13 Length=2

Propeller "left_prop", child of "left_pod"
  location (X Y Z) 1.60012 -1 0.38698, rotation 0 0 0; relative location 0.1 0 0, rotation 0 0 0
  bounding box size 0.064606 1.02085 1.16811
  Design: Diameter=1.3 NumBlade=3 Beta34=20 UseBeta34Flag=1 Feather=0 Rotate=0 Precone=0 ReverseFlag=0 FoldAngle=0 PropMode=0 AF=151.538 CLi=0.538798 Chord=0.177656 Solidity=0.169649 ConstructXoC=0.5 FeatherAxisXoC=0.5 FeatherOffsetXoC=0
  cross sections:
    n  RadiusFrac  shape
    0  0.2         ellipse Ellipse_Height=0.026 Ellipse_Width=0.052
    1  0.4         NACA 16-series Chord=0.108063 IdealCl=0.7 ThickChord=0.144074
    2  1           NACA 16-series Chord=0.0845 IdealCl=0.2 ThickChord=0.03
  Chord along r/R (cubic Bezier): 0.2: 0.08, 0.333333: 0.15, 0.466667: 0.2, 0.6: 0.2, 0.716667: 0.2, 0.833333: 0.2, 0.95: 0.2, 0.966667: 0.2, 0.983333: 0.2, 1: 0.13
  Twist along r/R (PCHIP): 0.2: 46.75, 0.75: 20, 1: 13
  Thick along r/R (cubic Bezier): 0.2: 0.5, 0.233333: 0.3, 0.266667: 0.225, 0.3: 0.2, 0.4: 0.125, 0.5: 0.115, 0.6: 0.1, 0.733333: 0.075, 0.866667: 0.055, 1: 0.03
  CLI along r/R (cubic Bezier): 0.2: 0, 0.266667: 0.7, 0.333333: 0.7, 0.4: 0.7, 0.466667: 0.7, 0.533333: 0.7, 0.6: 0.7, 0.733333: 0.7, 0.866667: 0.7, 1: 0.2

Pod "right_pod", child of "main_wing"
  location (X Y Z) 1.40018 1 0.39047, rotation 0 2 0; relative location -0.3 1 0, rotation 0 0 0
  bounding box size 2.00952 0.307692 0.377304
  Design: FineRatio=13 Length=2

Propeller "right_prop", child of "right_pod"
  location (X Y Z) 1.50012 1.1 0.38698, rotation 0 2 0; relative location 0.1 0.1 0, rotation 0 0 0
  bounding box size 0.105333 1.02085 1.16966
  Design: Diameter=1.3 NumBlade=3 Beta34=20 UseBeta34Flag=1 Feather=0 Rotate=0 Precone=0 ReverseFlag=0 FoldAngle=0 PropMode=0 AF=151.538 CLi=0.538798 Chord=0.177656 Solidity=0.169649 ConstructXoC=0.5 FeatherAxisXoC=0.5 FeatherOffsetXoC=0
  cross sections:
    n  RadiusFrac  shape
    0  0.2         ellipse Ellipse_Height=0.026 Ellipse_Width=0.052
    1  0.4         NACA 16-series Chord=0.108063 IdealCl=0.7 ThickChord=0.144074
    2  1           NACA 16-series Chord=0.0845 IdealCl=0.2 ThickChord=0.03
  blade curves as in "left_prop"

Wing "h1", child of "main_fuse"
  location (X Y Z) 5.67 0 0, rotation 0 0 0
  symmetric about XZ
  bounding box size 0.6 1.8 0.090039
  totals: TotalSpan=1.8 TotalProjectedSpan=1.8 TotalChord=0.6 TotalArea=1.08 TotalAR=3 MAC=0.6
  root: chord 0.6, twist 0, NACA 4-series Camber=0 CamberLoc=0.2 ThickChord=0.15
  sections:
    n  Span  Root_Chord  Tip_Chord  Area  Sweep  Sweep_Location  Dihedral  Twist  Twist_Location  tip airfoil
    1  0.9   0.6         0.6        0.54  0      0               0         0      0.25            NACA 4-series Camber=0 CamberLoc=0.2 ThickChord=0.1

Wing "v1.1", child of "main_fuse"
  location (X Y Z) 5.8 0 0.1, rotation 90 0 0
  bounding box size 0.47 0.0470273 0.64
  totals: TotalSpan=0.64 TotalProjectedSpan=0.64 TotalChord=0.26 TotalArea=0.1664 TotalAR=2.46154 MAC=0.316538
  root: chord 0.47, twist 0, NACA 4-series Camber=0 CamberLoc=0.2 ThickChord=0.1
  sections:
    n  Span  Root_Chord  Tip_Chord  Area    Sweep  Sweep_Location  Dihedral  Twist  Twist_Location  tip airfoil
    1  0.64  0.47        0.05       0.1664  30     0               0         0      0.25            as above

Custom "CubeSat_1", child of "main_fuse"
  location (X Y Z) 0.9 0 0, rotation 0 0 0
  bounding box size 0.328333 0.328333 0.328333
  Design: Height=0.328333 Length=0.328333 SquareFlag=0 Width=0.328333
  custom script Box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

Custom "CubeSat_2", child of "main_fuse"
  location (X Y Z) 1.25 0 0, rotation 0 0 0
  bounding box size 0.328333 0.328333 0.328333
  Design: Height=0.328333 Length=0.328333 SquareFlag=0 Width=0.328333
  custom script Box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

Mesh "MeshGeom"
  location (X Y Z) 0 0 0, rotation 0 0 0
  bounding box size 6.43564 0.7 0.75
  triangle mesh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

Mesh "MeshGeom"
  location (X Y Z) 0 0 0, rotation 0 0 0
  bounding box size 2.03481 7.98018 0.309256
  triangle mesh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

Mesh "MeshGeom"
  location (X Y Z) 0 0 0, rotation 0 0 0
  bounding box size 0.6 1.8 0.0898216
  triangle mesh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

Mesh "MeshGeom"
  location (X Y Z) 0 0 0, rotation 0 0 0
  bounding box size 0.47 0.0469615 0.64
  triangle mesh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
