OpenVSP model (file version 5), 23 components.
Geometry view with OpenVSP parameter names; values to 6 digits, angles in degrees, lengths in the model's unit.
Overall bounding box: X_Min=-0.164975 X_Len=6.93851 Y_Min=-3.99009 Y_Len=7.98018 Z_Min=-1.43481 Z_Len=3.29208

Fuselage "main_fuse"
  location (X Y Z) 0 0 0, rotation 0 0 0
  bounding box size 6.43501 0.7 0.75
  Design: Length=6.27
  cross sections:
    n  CurveBasis  XLocPercent  YLocPercent  ZLocPercent  shape
    0  0           0            0            0            ellipse Ellipse_Height=0.43 Ellipse_Width=0.4
    1  0           0.125        0            0            ellipse Ellipse_Height=0.75 Ellipse_Width=0.7
    2  0           0.558499     0            0            as above
    3  0           1            0            0            ellipse Ellipse_Height=0.214 Ellipse_Width=0.2
    4  0           1            0            0            as above

Wing "main_wing", child of "main_fuse"
  location (X Y Z) 1.7 0 0.38, rotation 0 2 0
  symmetric about XZ
  bounding box size 2.0443 7.9792 0.360296
  totals: TotalSpan=7.9792 TotalProjectedSpan=7.9792 TotalChord=1.62851 TotalArea=12.9942 TotalAR=4.89969 MAC=1.66199
  root: chord 2.03539, twist 0, airfoil file "SD7062 (14%)"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 BaseThickChord=0.140831 ThickChord=0.140831
  sections:
    n  Span    Root_Chord  Tip_Chord  Area    Sweep  Sweep_Location  Dihedral  Twist  Twist_Location  tip airfoil
    1  3.9896  2.03539     1.22163    6.4971  0      0               0         1.5    0.25            NACA 4-series Camber=0 CamberLoc=0.2 ThickChord=0.1
  SS_Control "SS_CONT_1": UStart=0.4 UEnd=0.6 Length_C_Start=0.25 Length_C_End=0.25 Length_Start=0.46803 Length_End=0.346038 LE_Flag=0 Surf_Type=2

Pod "left_pod", child of "main_wing"
  location (X Y Z) 1.50012 -1 0.38698, rotation 0 2 0; relative location -0.2 -1 0, rotation 0 0 0
  bounding box size 2.00343 0.133333 0.203051
  Design: FineRatio=30 Length=2

Propeller "left_prop", child of "left_pod"
  location (X Y Z) 1.60012 -1 0.38698, rotation 0 0 0; relative location 0.1 0 0, rotation 0 0 0
  bounding box size 0.064606 1.02085 1.16811
  Design: Diameter=1.3 NumBlade=3 Beta34=20 UseBeta34Flag=1 Feather=0 Rotate=0 Precone=0 ReverseFlag=0 FoldAngle=0 PropMode=0 AF=151.538 CLi=0.538798 Chord=0.177656 Solidity=0.169649 ConstructXoC=0.5 FeatherAxisXoC=0.5 FeatherOffsetXoC=0
  cross sections:
    n  RadiusFrac  shape
    0  0.2         ellipse Ellipse_Height=0.026 Ellipse_Width=0.052
    1  0.4         NACA 16-series Chord=0.108063 IdealCl=0.7 ThickChord=0.144074
    2  1           NACA 16-series Chord=0.0845 IdealCl=0.2 ThickChord=0.03
  Chord along r/R (cubic Bezier): 0.2: 0.08, 0.333333: 0.15, 0.466667: 0.2, 0.6: 0.2, 0.716667: 0.2, 0.833333: 0.2, 0.95: 0.2, 0.966667: 0.2, 0.983333: 0.2, 1: 0.13
  Twist along r/R (PCHIP): 0.2: 46.75, 0.75: 20, 1: 13
  Thick along r/R (cubic Bezier): 0.2: 0.5, 0.233333: 0.3, 0.266667: 0.225, 0.3: 0.2, 0.4: 0.125, 0.5: 0.115, 0.6: 0.1, 0.733333: 0.075, 0.866667: 0.055, 1: 0.03
  CLI along r/R (cubic Bezier): 0.2: 0, 0.266667: 0.7, 0.333333: 0.7, 0.4: 0.7, 0.466667: 0.7, 0.533333: 0.7, 0.6: 0.7, 0.733333: 0.7, 0.866667: 0.7, 1: 0.2

Pod "right_pod", child of "main_wing"
  location (X Y Z) 1.40018 1 0.39047, rotation 0 2 0; relative location -0.3 1 0, rotation 0 0 0
  bounding box size 2.00343 0.133333 0.203051
  Design: FineRatio=30 Length=2

Propeller "right_prop", child of "right_pod"
  location (X Y Z) 1.50012 1 0.38698, rotation 0 2 0; relative location 0.1 0 0, rotation 0 0 0
  bounding box size 0.105333 1.02085 1.16966
  Design: Diameter=1.3 NumBlade=3 Beta34=20 UseBeta34Flag=1 Feather=0 Rotate=0 Precone=0 ReverseFlag=0 FoldAngle=0 PropMode=0 AF=151.538 CLi=0.538798 Chord=0.177656 Solidity=0.169649 ConstructXoC=0.5 FeatherAxisXoC=0.5 FeatherOffsetXoC=0
  cross sections:
    n  RadiusFrac  shape
    0  0.2         ellipse Ellipse_Height=0.026 Ellipse_Width=0.052
    1  0.4         NACA 16-series Chord=0.108063 IdealCl=0.7 ThickChord=0.144074
    2  1           NACA 16-series Chord=0.0845 IdealCl=0.2 ThickChord=0.03
  blade curves as in "left_prop"

Fuselage "Motors", child of "main_wing"
  location (X Y Z) 1.7 1 0.38, rotation 0 2 0; relative location 0 1 0, rotation 0 0 0
  symmetric about XZ
  bounding box size 0.41146 2.33536 0.349111
  Design: Length=0.4
  cross sections:
    n  CurveBasis  XLocPercent  YLocPercent  ZLocPercent  shape
    0  0           0            0            0            circle Circle_Diameter=0.3
    1  0           0.25         0            0            as above
    2  0           0.5          0            0            as above
    3  0           1            0            0            as above

Wing "Horizontal_tail_1", child of "main_fuse"
  location (X Y Z) 5.1 0 0, rotation 0 0 0
  symmetric about XZ
  bounding box size 1.09545 3.28634 0.164388
  totals: TotalSpan=3.28634 TotalProjectedSpan=3.28634 TotalChord=1.09545 TotalArea=3.6 TotalAR=3 MAC=1.09545
  root: chord 1.09545, twist 0, NACA 4-series Camber=0 CamberLoc=0.2 ThickChord=0.15
  sections:
    n  Span     Root_Chord  Tip_Chord  Area  Sweep  Sweep_Location  Dihedral  Twist  Twist_Location  tip airfoil
    1  1.64317  1.09545     1.09545    1.8   0      0               0         0      0.25            NACA 4-series Camber=0 CamberLoc=0.2 ThickChord=0.1
  SS_Control "SS_CONT_0": UStart=0.4 UEnd=0.6 Length_C_Start=0.25 Length_C_End=0.25 Length_Start=0.273861 Length_End=0.273861 LE_Flag=0 Surf_Type=2

Wing "Vertical_tail_2", child of "main_fuse"
  location (X Y Z) 5.1 0 0.1, rotation 90 0 0
  bounding box size 1.67354 0.109893 1.75727
  totals: TotalSpan=1.75727 TotalProjectedSpan=1.75727 TotalChord=0.878635 TotalArea=1.544 TotalAR=2 MAC=0.89694
  root: chord 1.09829, twist 0, NACA 4-series Camber=0 CamberLoc=0.2 ThickChord=0.1
  sections:
    n  Span     Root_Chord  Tip_Chord  Area   Sweep  Sweep_Location  Dihedral  Twist  Twist_Location  tip airfoil
    1  1.75727  1.09829     0.658976   1.544  30     0               0         0      0.25            as above
  SS_Control "SS_CONT_0": UStart=0.4 UEnd=0.6 Length_C_Start=0.25 Length_C_End=0.25 Length_Start=0.252608 Length_End=0.18671 LE_Flag=0 Surf_Type=2

Custom "CubeSat_1", child of "main_fuse"
  location (X Y Z) 0.9 0 0, rotation 0 0 0
  bounding box size 0.328333 0.328333 0.328333
  Design: Height=0.328333 Length=0.328333 SquareFlag=0 Width=0.328333
  custom script Box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

Custom "CubeSat_2", child of "main_fuse"
  location (X Y Z) 1.25 0 0, rotation 0 0 0
  bounding box size 0.328333 0.328333 0.328333
  Design: Height=0.328333 Length=0.328333 SquareFlag=0 Width=0.328333
  custom script Box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

Custom "tail_gear_arm", child of "main_fuse"
  location (X Y Z) 5.5 0 -0.434783, rotation 0 0 0
  bounding box size 0.0416667 0.042 0.925005
  Design: Height=0.925005 Length=0.0416667 SquareFlag=0 Width=0.042
  custom script Box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

Gear "Gear_Tail", child of "tail_gear_arm"
  location (X Y Z) 5.5 0 -1, rotation 0 0 0
  bounding box size 0.358333 0.164564 0.358333
  Gear: GearConfigMode=0
  bogie "BOGIE_0": NumAcross=1 NumTandem=1 Spacing=0.0916667 Pitch=0.394167 Symmetrical=0 XContactPt=0 YContactPt=0 TravelCompressed=1 TravelExtended=1 SteeringAngle=0 DiameterModel=0.358333 WidthModel=0.0833333 PlyRating=20

Custom "arm_main_gear", child of "main_fuse"
  location (X Y Z) 1.5 0.434783 -0.72, rotation 49 0 0
  symmetric about XZ
  bounding box size 0.042 1.99145 0.982983
  Design: Height=1.45 Length=0.042 SquareFlag=0 Width=0.042
  custom script Box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

Gear "Gear_Main", child of "arm_main_gear"
  location (X Y Z) 1.5 0 -1.4, rotation 0 0 0
  symmetric about XZ
  bounding box size 0.5 2.27767 0.5
  Gear: GearConfigMode=0
  bogie "front_left": NumAcross=1 NumTandem=1 Spacing=0.108167 Pitch=0.55 Symmetrical=1 XContactPt=0 YContactPt=1.05 TravelCompressed=1 TravelExtended=1 SteeringAngle=0 DiameterModel=0.5 WidthModel=0.0983333 PlyRating=20

Custom "Battery", child of "main_fuse"
  location (X Y Z) 1.73913 0 0, rotation 0 0 0
  bounding box size 0.66 0.37 0.37
  Design: Height=0.37 Length=0.66 SquareFlag=0 Width=0.37
  custom script Box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

Custom "Motor", child of "main_fuse"
  location (X Y Z) 0 0 0, rotation 0 0 0
  bounding box size 0.4 0.3 0.3
  Design: Height=0.3 Length=0.4 SquareFlag=0 Width=0.3
  custom script Box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

Mesh "MeshGeom"
  location (X Y Z) 0 0 0, rotation 0 0 0
  bounding box size 6.43564 0.7 0.75
  triangle mesh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

Mesh "MeshGeom"
  location (X Y Z) 0 0 0, rotation 0 0 0
  bounding box size 2.03481 7.98018 0.309256
  triangle mesh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

Mesh "MeshGeom"
  location (X Y Z) 0 0 0, rotation 0 0 0
  bounding box size 0.6 1.8 0.0898216
  triangle mesh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

Mesh "MeshGeom"
  location (X Y Z) 0 0 0, rotation 0 0 0
  bounding box size 0.47 0.0469615 0.64
  triangle mesh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

NGonMesh "MeshGeom_NGon"
  location (X Y Z) 0 0 0, rotation 0 0 0
  bounding box size 6.77354 7.9792 3.29208

NGonMesh "MeshGeom_NGon"
  location (X Y Z) 0 0 0, rotation 0 0 0
  bounding box size 4.49513 3.9896 0.437537

VSPAERO settings (reference component "main_wing"): Sref=12.9942 bref=7.9792 cref=1.66199 Xcg=0 Ycg=0 Zcg=0 AlphaStart=-5 AlphaEnd=12 AlphaNpts=18 BetaStart=0 BetaEnd=0 BetaNpts=1 MachStart=0.001 MachEnd=0 MachNpts=1 ReCref=1e+07 Vinf=100 Rho=0.002377
  control group "Unnamed Control Group": DeflectionAngle=0
