OpenVSP model (file version 5), 16 components.
Geometry view with OpenVSP parameter names; values to 6 digits, angles in degrees, lengths in the model's unit.
Overall bounding box: X_Min=0 X_Len=234.269 Y_Min=-97.6614 Y_Len=195.323 Z_Min=-16 Z_Len=60.8443

Fuselage "Main Fuse"
  location (X Y Z) 0 0 0, rotation 0 0 0
  bounding box size 234.269 21 26
  mass: Density=0.9058 Shell_Flag=0 Mass_Area=1 Mass_Prior=0
  Design: Length=231.833
  cross sections:
    n   XLocPercent  YLocPercent  ZLocPercent  shape
    0   0            0            0            point
    1   0.015625     0            0            ellipse Ellipse_Height=9 Ellipse_Width=8
    2   0.03125      0            0            ellipse Ellipse_Height=13 Ellipse_Width=11.3951
    3   0.0625       0            0.0043134    ellipse Ellipse_Height=20 Ellipse_Width=15.6
    4   0.078125     0            0.0053918    ellipse Ellipse_Height=23 Ellipse_Width=18.3929
    5   0.085938     0            0.0053918    ellipse Ellipse_Height=24.5 Ellipse_Width=19.5
    6   0.09375      0            0.0043134    ellipse Ellipse_Height=26 Ellipse_Width=20
    7   0.125        0            0.0043134    ellipse Ellipse_Height=26 Ellipse_Width=21
    8   0.25512      0            0.0043134    as above
    9   0.375        0            -0.0021567   ellipse Ellipse_Height=22 Ellipse_Width=20
    10  0.5          0            -0.0043134   as above
    11  0.625        0            -0.0043134   as above
    12  0.75         0            0.0086269    ellipse Ellipse_Height=17 Ellipse_Width=20
    13  0.8125       0            0.017254     ellipse Ellipse_Height=14 Ellipse_Width=17
    14  0.875        0            0.023724     ellipse Ellipse_Height=11 Ellipse_Width=15
    15  0.9375       0            0.028037     ellipse Ellipse_Height=9 Ellipse_Width=12
    16  1            0            0.036664     circle Circle_Diameter=7

Wing "Main Wing", child of "Main Fuse"
  location (X Y Z) 60 0 -6.72127, rotation 0 1.5 0
  symmetric about XZ
  bounding box size 92.394 195.323 12.8123
  mass: Density=8.1657 Shell_Flag=0 Mass_Area=1 Mass_Prior=0
  totals: TotalSpan=195.8 TotalProjectedSpan=195.323 TotalChord=29.0794 TotalArea=5693.74 TotalAR=6.70052 MAC=34.7246
  root: chord 54.0001, twist 0, NACA 63-series A=1 IdealCl=0.4 ThickChord=0.14
  sections:
    n  Span   Root_Chord  Tip_Chord  Area     Sweep  Sweep_Location  Dihedral  Twist  Twist_Location  tip airfoil
    1  48.95  54.0001     26.1587    1961.89  40     0               4         -1     0.25            NACA 63-series A=1 IdealCl=0.4 ThickChord=0.125
    2  48.95  26.1587     10         884.984  40     0               4         -2     0.25            as above

Wing "Horz Tail", child of "Main Fuse"
  location (X Y Z) 188.806 0 6.4754, rotation 0 1.3 0
  symmetric about XZ
  bounding box size 38.9735 74.9999 4.50232
  mass: Density=4.2257 Shell_Flag=0 Mass_Area=1 Mass_Prior=0
  totals: TotalSpan=74.9999 TotalProjectedSpan=74.9999 TotalChord=19.881 TotalArea=1491.07 TotalAR=3.77244 MAC=21.6521
  root: chord 30.1588, twist 0, NACA 4-series Camber=0 CamberLoc=0.2 ThickChord=0.12
  sections:
    n  Span     Root_Chord  Tip_Chord  Area     Sweep  Sweep_Location  Dihedral  Twist  Twist_Location  tip airfoil
    1  37.4999  30.1588     9.60322    745.536  38     0               0         0      0.25            as above
  SS_Control "Elevator": EtaStart=0.2 EtaEnd=1 Length_C_Start=0.25 Length_C_End=0.25 Length_Start=6.51191 Length_End=2.4008 LE_Flag=0 Surf_Type=2

Wing "Vert Tail", child of "Main Fuse"
  location (X Y Z) 171.793 0 4.3443, rotation 90 0 0
  bounding box size 59.2497 6.30193 40.5
  mass: Density=4.1498 Shell_Flag=0 Mass_Area=1 Mass_Prior=0
  totals: TotalSpan=40.5 TotalProjectedSpan=40.5 TotalChord=27.9919 TotalArea=1133.67 TotalAR=1.44685 MAC=31.4367
  root: chord 45, twist 0, NACA 4-series Camber=0 CamberLoc=0.2 ThickChord=0.14
  sections:
    n  Span  Root_Chord  Tip_Chord  Area     Sweep  Sweep_Location  Dihedral  Twist  Twist_Location  tip airfoil
    1  40.5  45          10.9837    1133.67  50     0               0         0      0.25            NACA 4-series Camber=0 CamberLoc=0.2 ThickChord=0.12

Custom "Main Gear Placeholder", child of "Main Fuse"
  location (X Y Z) 109 0 -8, rotation 0 0 0
  bounding box size 5 7 3
  mass: Density=229.508 Shell_Flag=0 Mass_Area=1 Mass_Prior=1
  Design: Height=3 Length=5 SquareFlag=0 Width=7
  custom script Box0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

Custom "Nose Gear Placeholder", child of "Main Fuse"
  location (X Y Z) 25 0 -8, rotation 0 0 0
  bounding box size 5 7 3
  mass: Density=61.2022 Shell_Flag=0 Mass_Area=1 Mass_Prior=1
  Design: Height=3 Length=5 SquareFlag=0 Width=7
  custom script Box0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

Custom "all other CG placeholder", child of "Main Fuse"
  location (X Y Z) 103 0 -5, rotation 0 0 0
  bounding box size 5 7 3
  mass: Density=1209.81 Shell_Flag=0 Mass_Area=1 Mass_Prior=1
  Design: Height=3 Length=5 SquareFlag=0 Width=7
  custom script Box0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

Custom "Inboard Main Wing Fuel Cells", child of "Main Fuse"
  location (X Y Z) 80.3821 7.75 -5.16304, rotation 1 0 50
  symmetric about XZ
  bounding box size 39.9086 94.4049 2.76503
  mass: Density=1 Shell_Flag=0 Mass_Area=1 Mass_Prior=4
  Design: Height=2 Length=45.7273 SquareFlag=0 Width=13.7273
  custom script Box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

Custom "Outboard Main Wing Fuel Tank", child of "Main Fuse"
  location (X Y Z) 108.167 45.8071 -3.6413, rotation 1 0 52.1739
  symmetric about XZ
  bounding box size 25.5069 144.537 1.60972
  mass: Density=1 Shell_Flag=0 Mass_Area=1 Mass_Prior=4
  Design: Height=1.1 Length=30 SquareFlag=0 Width=9
  custom script Box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

Custom "Crew Area Box", child of "Main Fuse"
  location (X Y Z) 20.5435 0 4.78261, rotation 0 0 0
  bounding box size 10 12 8
  mass: Density=1 Shell_Flag=0 Mass_Area=1 Mass_Prior=1
  Design: Height=8 Length=10 SquareFlag=0 Width=12
  custom script Box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

Custom "Passenger Box", child of "Main Fuse"
  location (X Y Z) 37.4185 0 2.28261, rotation 0 0 0
  bounding box size 135 13 9
  mass: Density=1 Shell_Flag=0 Mass_Area=1 Mass_Prior=1
  Design: Height=9 Length=135 SquareFlag=0 Width=13
  custom script Box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

Fuselage "Inside Engine Pair"
  location (X Y Z) 76.6531 -39 -11, rotation 0 0 0
  symmetric about XZ
  bounding box size 35 88 10
  mass: Density=6.4322 Shell_Flag=0 Mass_Area=1 Mass_Prior=0
  Design: Length=35
  cross sections:
    n  XLocPercent  YLocPercent  ZLocPercent  shape
    0  0            0            0            circle Circle_Diameter=10
    1  0.33333      0            0            as above
    2  0.5          0            0            circle Circle_Diameter=5
    3  0.75         0            0            circle Circle_Diameter=4
    4  1            0            0            point

Fuselage "Outside Engine Pair", child of "Inside Engine Pair"
  location (X Y Z) 102.653 -68 -9.1633, rotation 0 0 0
  symmetric about XZ
  bounding box size 35 146 10
  mass: Density=6.7836 Shell_Flag=0 Mass_Area=1 Mass_Prior=0
  Design: Length=35
  cross sections:
    n  XLocPercent  YLocPercent  ZLocPercent  shape
    0  0            0            0            circle Circle_Diameter=10
    1  0.33333      0            0            as above
    2  0.5          0            0            circle Circle_Diameter=5
    3  0.75         0            0            circle Circle_Diameter=4
    4  1            0            0            point

Wing "Inside Engine Pylons", child of "Outside Engine Pair"
  location (X Y Z) 78 39 -10, rotation 90 0 0
  symmetric about XZ
  bounding box size 34.9535 81.0653 6
  mass: Density=29.9383 Shell_Flag=0 Mass_Area=1 Mass_Prior=0
  totals: TotalSpan=12 TotalProjectedSpan=12 TotalChord=25.0079 TotalArea=300.095 TotalAR=0.479848 MAC=25.4299
  root: chord 30.6349, twist 0, NACA 4-series Camber=0 CamberLoc=0.2 ThickChord=0.1
  sections:
    n  Span  Root_Chord  Tip_Chord  Area     Sweep    Sweep_Location  Dihedral  Twist  Twist_Location  tip airfoil
    1  6     30.6349     19.381     150.048  68.9286  0               0         0      0.25            NACA 4-series Camber=0 CamberLoc=0.2 ThickChord=0.05

Wing "Outside Engine Pylon", child of "Inside Engine Pylons"
  location (X Y Z) 102.979 68 -9.3443, rotation 90 0 0
  symmetric about XZ
  bounding box size 32.1757 139.065 6.00001
  mass: Density=40.414 Shell_Flag=0 Mass_Area=1 Mass_Prior=0
  totals: TotalSpan=12 TotalProjectedSpan=12 TotalChord=23.619 TotalArea=283.429 TotalAR=0.508066 MAC=24.3137
  root: chord 30.6349, twist 0, NACA 4-series Camber=0 CamberLoc=0.2 ThickChord=0.1
  sections:
    n  Span     Root_Chord  Tip_Chord  Area     Sweep    Sweep_Location  Dihedral  Twist  Twist_Location  tip airfoil
    1  6.00001  30.6349     16.6032    141.714  68.9286  0               0         0      0.25            NACA 4-series Camber=0 CamberLoc=0.2 ThickChord=0.05

Mesh "MeshGeom"
  location (X Y Z) 0 0 0, rotation 0 0 0

VSPAERO settings (reference component "Main Wing"): Sref=5693.74 bref=195.8 cref=29.0794 Xcg=109 Ycg=0 Zcg=0 AlphaStart=2 AlphaEnd=4 AlphaNpts=1 BetaStart=0 BetaEnd=0 BetaNpts=1 MachStart=0.8 MachEnd=0 MachNpts=1 ReCref=1e+10 Vinf=825 Rho=0.0007
  control group "Elevator": DeflectionAngle=-0.026
