OpenVSP model (file version 5), 14 components.
Geometry view with OpenVSP parameter names; values to 6 digits, angles in degrees, lengths in the model's unit.
Overall bounding box: X_Min=-0.70095 X_Len=30.0698 Y_Min=-18 Y_Len=36 Z_Min=-5.62498 Z_Len=11.173

Fuselage "FuselageGeom"
  location (X Y Z) 0 0 0, rotation 0 0 0
  bounding box size 27.1667 4.4767 6.00143
  Design: Length=27.1667
  cross sections:
    n  XLocPercent  YLocPercent  ZLocPercent  shape
    0  0            0            0            rounded rectangle RoundRectXSec_Radius=0.2 RoundedRect_Height=1.45953 RoundedRect_Width=2.35825
    1  0.121021     0            0            rounded rectangle RoundRectXSec_Radius=0.2 RoundedRect_Height=3.61091 RoundedRect_Width=4.23673
    2  0.276405     0            -0.027027    rounded rectangle RoundRectXSec_Radius=0.2 RoundedRect_Height=6.00143 RoundedRect_Width=4.4767
    3  0.41056      0            -0.027027    rounded rectangle RoundRectXSec_Radius=0.2 RoundedRect_Height=5.78158 RoundedRect_Width=4.4767
    4  0.544379     0            0            rounded rectangle RoundRectXSec_Radius=0.2 RoundedRect_Height=3.61554 RoundedRect_Width=3.04301
    5  0.768495     0            0            rounded rectangle RoundRectXSec_Radius=0.2 RoundedRect_Height=2.77622 RoundedRect_Width=1.82322
    6  1            0            0            rounded rectangle RoundRectXSec_Radius=0.2 RoundedRect_Height=1.64773 RoundedRect_Width=0.685714

Propeller "PropGeom", child of "FuselageGeom"
  location (X Y Z) 0 0 0, rotation 0 0 0
  bounding box size 0.412697 8.0263 2.85685
  Design: Diameter=8.18198 NumBlade=2 Beta34=20 UseBeta34Flag=1 Feather=0 Rotate=-15.3846 Precone=0 ReverseFlag=0 FoldAngle=0 PropMode=0 AF=149.288 CLi=0.524046 Chord=0.173625 Solidity=0.110533 ConstructXoC=0.5 FeatherAxisXoC=0.5 FeatherOffsetXoC=0
  cross sections:
    n  RadiusFrac  shape
    0  0           NACA 16-series Chord=0.327279 IdealCl=0 ThickChord=0.5
    1  1           NACA 16-series Chord=0.531828 IdealCl=0.2 ThickChord=0.03
  Chord along r/R (cubic Bezier): 0: 0.08, 0.2: 0.15, 0.4: 0.2, 0.6: 0.2, 0.716667: 0.2, 0.833333: 0.2, 0.95: 0.2, 0.966667: 0.2, 0.983333: 0.2, 1: 0.13
  Twist along r/R (PCHIP): 0: 46.75, 0.75: 20, 1: 13
  Thick along r/R (cubic Bezier): 0: 0.5, 0.133367: 0.3, 0.266733: 0.225, 0.4001: 0.2, 0.466733: 0.125, 0.533367: 0.115, 0.6: 0.1, 0.733333: 0.075, 0.866667: 0.055, 1: 0.03
  CLI along r/R (cubic Bezier): 0: 0, 0.133367: 0.7, 0.266733: 0.7, 0.4001: 0.7, 0.466733: 0.7, 0.533367: 0.7, 0.6: 0.7, 0.733333: 0.7, 0.866667: 0.7, 1: 0.2

Cone "Cone", child of "PropGeom"
  location (X Y Z) 0 0 0, rotation -180 0 -180; relative location 0 0 0, rotation 0 180 0
  bounding box size 0.70095 0.90095 0.90095
  Design: Diameter=0.90095 Height=0.70095
  custom script Cone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

Wing "WingGeom", child of "FuselageGeom"
  location (X Y Z) 6.54054 0 -3.72973, rotation 0 0 0
  symmetric about XZ
  bounding box size 4.83146 36 0.78333
  totals: TotalSpan=36 TotalProjectedSpan=36 TotalChord=4.44115 TotalArea=159.881 TotalAR=8.10601
  root: chord 4.76339, twist 0, NACA 4-series Camber=0.04 CamberLoc=0.4 ThickChord=0.15
  sections:
    n  Span  Root_Chord  Tip_Chord  Area     Sweep      Sweep_Location  Dihedral  Twist  Twist_Location  tip airfoil
    1  9     4.76339     4.83146    43.1768  -0.368435  0               0         0      0.25            NACA 4-series Camber=0 CamberLoc=0.2 ThickChord=0.1
    2  9     4.83146     3.3383     36.7639  3.57838    0               0         0      0.25            as above

Wing "WingGeom", child of "FuselageGeom"
  location (X Y Z) 22.6892 0 0, rotation 0 0 0
  symmetric about XZ
  bounding box size 4.35233 12.4041 0.522516
  totals: TotalSpan=12.4041 TotalProjectedSpan=12.4041 TotalChord=3.80052 TotalArea=47.1422 TotalAR=3.2638
  root: chord 4.35233, twist 0, NACA 4-series Camber=0 CamberLoc=0.2 ThickChord=0.12
  sections:
    n  Span     Root_Chord  Tip_Chord  Area     Sweep    Sweep_Location  Dihedral  Twist  Twist_Location  tip airfoil
    1  6.20207  4.35233     3.2487     23.5711  6.73394  0               0         0      0.25            NACA 4-series Camber=0 CamberLoc=0.2 ThickChord=0.1

Wing "WingGeom", child of "FuselageGeom"
  location (X Y Z) 22.3784 0 -0.702703, rotation -90 0 0
  bounding box size 6.99046 0.464518 4.92228
  totals: TotalSpan=4.92228 TotalProjectedSpan=4.92228 TotalChord=3.60363 TotalArea=17.7381 TotalAR=1.36592
  root: chord 4.64249, twist 0, NACA 4-series Camber=0 CamberLoc=0.2 ThickChord=0.1
  sections:
    n  Span     Root_Chord  Tip_Chord  Area     Sweep    Sweep_Location  Dihedral  Twist  Twist_Location  tip airfoil
    1  4.92228  4.64249     2.56477    17.7381  41.9592  0               0         0      0.25            as above

BodyOfRevolution "BORGeom", child of "FuselageGeom"
  location (X Y Z) 8.81 -5.2381 4.048, rotation 0 0 90
  bounding box size 3 1 3
  Design: A0=3.14159 Ae=3.14159 Amin=0.785398 AminW=0.25 Angle=0 Diameter=2 Mode=0
  profile: circle Circle_Diameter=1

BodyOfRevolution "BORGeom", child of "FuselageGeom"
  location (X Y Z) 8.80952 4.29682 4.04781, rotation 0 0 90
  bounding box size 3 1 3
  Design: A0=3.14159 Ae=3.14159 Amin=0.785398 AminW=0.25 Angle=0 Diameter=2 Mode=0
  profile: circle Circle_Diameter=1

BodyOfRevolution "BORGeom", child of "FuselageGeom"
  location (X Y Z) 3.09524 -0.47619 4.048, rotation 0 0 90
  bounding box size 3 1 3
  Design: A0=3.14159 Ae=3.14159 Amin=0.785398 AminW=0.25 Angle=0 Diameter=2 Mode=0
  profile: circle Circle_Diameter=1

Box "Box", child of "FuselageGeom"
  location (X Y Z) 8.80952 4.7619 4.28571, rotation -180 -88.75 38.7405; relative location 8.80952 4.7619 4.28571, rotation 0 -91.25 -141.26
  bounding box size 0.860246 3.91728 4.65227
  Design: Height=0.759275 Length=5.37564 SquareFlag=0 Width=0.709292
  custom script Box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

Box "Box", child of "FuselageGeom"
  location (X Y Z) 8.81 -4.52352 4.286, rotation -180 -88.75 -35.9733; relative location 8.81 -4.52352 4.286, rotation 0 -91.25 144.027
  bounding box size 0.847092 3.20853 4.06204
  Design: Height=0.759 Length=4.48538 SquareFlag=0 Width=0.709
  custom script Box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

Box "Box", child of "FuselageGeom"
  location (X Y Z) 3.09524 0 3.33333, rotation 0 90 0
  bounding box size 0.65095 0.567633 2.25085
  Design: Height=0.65095 Length=2.25085 SquareFlag=0 Width=0.567633
  custom script Box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

Box "Box", child of "FuselageGeom"
  location (X Y Z) 6.78571 -1.66667 1.42857, rotation -60 90 0; relative location 6.78571 -1.66667 1.42857, rotation 0 90 -60
  bounding box size 0.325975 9.01919 5.37138
  Design: Height=0.325975 Length=10.2503 SquareFlag=0 Width=0.284317
  custom script Box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

Box "Box", child of "FuselageGeom"
  location (X Y Z) 6.786 1.667 1.429, rotation 60 90 0; relative location 6.786 1.667 1.429, rotation 0 90 60
  bounding box size 0.326 9.01876 5.37095
  Design: Height=0.326 Length=10.25 SquareFlag=0 Width=0.284
  custom script Box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
